*NODE, NSET=THREE_NODES
1,	  0,  	0
2,	200,  	0
3,	200,  300
*ELEMENT, TYPE=T2D2, ELSET=TRUSS
100, 1, 2
200, 2, 3
*SOLID SECTION, ELSET=TRUSS, MATERIAL=MATERIAL-1
25
*MATERIAL, NAME=MATERIAL-1
*ELASTIC, TYPE=ISO
200000, 0.3
**
*STEP
*STATIC
*BOUNDARY
1, 1
1, 2
3, 1
3, 2
*CLOAD
2, 1, 35.36
2, 2, 35.36
**
*OUTPUT, FIELD
*NODE OUTPUT, NSET=THREE_NODES
RF, U
*ELEMENT OUTPUT, ELSET=TRUSS
S, E
*END STEP
